<neuroml xmlns="http://www.neuroml.org/schema/neuroml2"  xmlns:xs="http://www.w3.org/2001/XMLSchema" xmlns:xsi="http://www.w3.org/2001/XMLSchema-instance" xsi:schemaLocation="http://www.neuroml.org/schema/neuroml2 https://raw.github.com/NeuroML/NeuroML2/development/Schemas/NeuroML2/NeuroML_v2beta5.xsd" id="Multiscale__g1_5__i250D">
    <notes>

This NeuroML 2 file was generated by OpenCortex v0.1.5 using:
    libNeuroML v0.2.34
    pyNeuroML v0.3.1

    </notes>
    <property tag="Network seed" value="1234"/>
    <include href="Multiscale__g1_5__i250D/AllenHH_477127614.cell.nml"></include>
    <include href="Multiscale__g1_5__i250D/NaTs.channel.nml"></include>
    <include href="Multiscale__g1_5__i250D/K_P.channel.nml"></include>
    <include href="Multiscale__g1_5__i250D/Nap.channel.nml"></include>
    <include href="Multiscale__g1_5__i250D/Kv3_1.channel.nml"></include>
    <include href="Multiscale__g1_5__i250D/K_T.channel.nml"></include>
    <include href="Multiscale__g1_5__i250D/SK.channel.nml"></include>
    <include href="Multiscale__g1_5__i250D/Im.channel.nml"></include>
    <include href="Multiscale__g1_5__i250D/Ih.channel.nml"></include>
    <include href="Multiscale__g1_5__i250D/Ca_LVA.channel.nml"></include>
    <include href="Multiscale__g1_5__i250D/Ca_HVA.channel.nml"></include>
    <include href="Multiscale__g1_5__i250D/pas.channel.nml"></include>
    <include href="Multiscale__g1_5__i250D/CaDynamics.nml"></include>
    <include href="Multiscale__g1_5__i250D/AllenHH_476686112.cell.nml"></include>
    <include href="Multiscale__g1_5__i250D/L23_Retuned_477127614.cell.nml"></include>
    <include href="Multiscale__g1_5__i250D/ca.channel.nml"></include>
    <include href="Multiscale__g1_5__i250D/it.channel.nml"></include>
    <include href="Multiscale__g1_5__i250D/kca.channel.nml"></include>
    <include href="Multiscale__g1_5__i250D/km.channel.nml"></include>
    <include href="Multiscale__g1_5__i250D/kv.channel.nml"></include>
    <include href="Multiscale__g1_5__i250D/na.channel.nml"></include>
    <include href="Multiscale__g1_5__i250D/cNAC187_L23_NBC_9d37c4b1f8_0_0.cell.nml"></include>
    <include href="Multiscale__g1_5__i250D/K_Tst.channel.nml"></include>
    <include href="Multiscale__g1_5__i250D/SKv3_1.channel.nml"></include>
    <include href="Multiscale__g1_5__i250D/Nap_Et2.channel.nml"></include>
    <include href="Multiscale__g1_5__i250D/NaTs2_t.channel.nml"></include>
    <include href="Multiscale__g1_5__i250D/NaTa_t.channel.nml"></include>
    <include href="Multiscale__g1_5__i250D/Ca_LVAst.channel.nml"></include>
    <include href="Multiscale__g1_5__i250D/SK_E2.channel.nml"></include>
    <include href="Multiscale__g1_5__i250D/K_Pst.channel.nml"></include>
    <include href="Multiscale__g1_5__i250D/CaDynamics_E2_NML2.nml"></include>
    <include href="Multiscale__g1_5__i250D/Ca.channel.nml"></include>
    <expTwoSynapse id="synAmpa1" gbase="1.0nS" erev="0mV" tauDecay="5ms" tauRise="0.5ms"/>
    <expTwoSynapse id="synGaba1" gbase="1.5nS" erev="-80mV" tauDecay="20ms" tauRise="1ms"/>
    <poissonFiringSynapse id="psf1" averageRate="250 Hz" synapse="synAmpa1" spikeTarget="./synAmpa1"/>
    <network id="Multiscale__g1_5__i250D" type="networkWithTemperature" temperature="32degC">
        <population id="popExc2" component="L23_Retuned_477127614" size="80" type="populationList">
            <instance id="0">
                <location x="326.517474983999989" y="-11.853480164900001" z="-344.755970959000024"/>
            </instance>
            <instance id="1">
                <location x="287.68317371400002" y="87.853799472800006" z="57.559301141299997"/>
            </instance>
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        </population>
        <population id="popInh2" component="cNAC187_L23_NBC_9d37c4b1f8_0_0" size="40" type="populationList">
            <instance id="0">
                <location x="-236.225995164000011" y="-0.116794280789" z="308.033651657999997"/>
            </instance>
            <instance id="1">
                <location x="315.127889024000012" y="-72.012263718499995" z="22.6196485448"/>
            </instance>
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        </population>
        <projection id="projEE_popExc2_popExc2" presynapticPopulation="popExc2" postsynapticPopulation="popExc2" synapse="synAmpa1">
            <connectionWD id="0" preCellId="../popExc2/0/L23_Retuned_477127614" preFractionAlong="0.799682414861" postCellId="../popExc2/37/L23_Retuned_477127614" postFractionAlong="0.445029649269" weight="1." delay="2 ms"/>
            <connectionWD id="1" preCellId="../popExc2/0/L23_Retuned_477127614" preFractionAlong="0.501065084194" postCellId="../popExc2/73/L23_Retuned_477127614" postFractionAlong="0.501842385933" weight="1." delay="2 ms"/>
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        </projection>
        <projection id="projEI_popExc2_popInh2" presynapticPopulation="popExc2" postsynapticPopulation="popInh2" synapse="synAmpa1">
            <connectionWD id="0" preCellId="../popExc2/0/L23_Retuned_477127614" preFractionAlong="0.795132569243" postCellId="../popInh2/10/cNAC187_L23_NBC_9d37c4b1f8_0_0" postSegmentId="6" postFractionAlong="0.283397436057" weight="1." delay="2 ms"/>
            <connectionWD id="1" preCellId="../popExc2/0/L23_Retuned_477127614" preFractionAlong="0.179817403109" postCellId="../popInh2/0/cNAC187_L23_NBC_9d37c4b1f8_0_0" postSegmentId="5" postFractionAlong="0.0700656084793" weight="1." delay="2 ms"/>
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        </projection>
        <projection id="projIE_popInh2_popExc2" presynapticPopulation="popInh2" postsynapticPopulation="popExc2" synapse="synGaba1">
            <connectionWD id="0" preCellId="../popInh2/33/cNAC187_L23_NBC_9d37c4b1f8_0_0" preSegmentId="20" preFractionAlong="0.503820566446" postCellId="../popExc2/0/L23_Retuned_477127614" postFractionAlong="0.77914497267" weight="1." delay="2 ms"/>
            <connectionWD id="1" preCellId="../popInh2/21/cNAC187_L23_NBC_9d37c4b1f8_0_0" preSegmentId="10" preFractionAlong="0.729470221589" postCellId="../popExc2/0/L23_Retuned_477127614" postFractionAlong="0.309027177087" weight="1." delay="2 ms"/>
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        </projection>
        <projection id="projII_popInh2_popInh2" presynapticPopulation="popInh2" postsynapticPopulation="popInh2" synapse="synGaba1">
            <connectionWD id="0" preCellId="../popInh2/0/cNAC187_L23_NBC_9d37c4b1f8_0_0" preSegmentId="15" preFractionAlong="0.10601202486" postCellId="../popInh2/22/cNAC187_L23_NBC_9d37c4b1f8_0_0" postFractionAlong="0.569601414012" weight="1." delay="2 ms"/>
            <connectionWD id="1" preCellId="../popInh2/0/cNAC187_L23_NBC_9d37c4b1f8_0_0" preSegmentId="6" preFractionAlong="0.42497342848" postCellId="../popInh2/19/cNAC187_L23_NBC_9d37c4b1f8_0_0" postSegmentId="6" postFractionAlong="0.957911971832" weight="1." delay="2 ms"/>
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        </projection>
        <inputList id="Stim_popExc2" population="popExc2" component="psf1">
            <input id="0" target="../popExc2/0/L23_Retuned_477127614" destination="synapses" segmentId="0" fractionAlong="0.5"/>
            <input id="1" target="../popExc2/1/L23_Retuned_477127614" destination="synapses" segmentId="0" fractionAlong="0.5"/>
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        </inputList>
    </network>
</neuroml>
